Q(a, b) := integral(x*exp((-x^2 - a^2)/2)*In(0, a*x), x = b .. ∞)  # Функция Маркума
fp(x, ν, σ) := x/σ^2*exp(-(x^2 + ν^2)/(2*σ^2))*In(0, x*ν/σ^2)  # Функция плотности
fr(x, ν, σ) := 1 - e^(-x^2/(2*σ^2))  # Функция распределения
L(x) := e^(x/2)*((1 - x)*In(0, -x/2) - x*In(1, -x/2))  # Полином Лаггера
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x := 0, 0.01 .. 20
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Моменты
α2(ν, σ) := integral(x^2*fp(x, ν, σ), x = 0 .. 100)
α1(ν, σ) := integral(x*fp(x, ν, σ), x = 0 .. 100)
α3(ν, σ) := integral(x^3*fp(x, ν, σ), x = 0 .. 100)
# Мат Ожидание | Дисперсия
D1(ν, σ) := α2(ν, σ) - α1(ν, σ)^2
M1(ν, σ) := α1(ν, σ)
M2(ν, σ) := σ*sqrt(π/2)*L(-ν^2/(2*σ^2))
D2(ν, σ) := 2*σ^2 + ν^2 - π*σ^2/2*L(-ν^2/(2*σ^2))^2
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# Среднеквадратическое отклонение
σ1(ν, σ) := sqrt(D2(ν, σ))
# Коэффициент ассиметрии
S(ν, σ) := (2*α1(ν, σ)^3 - 3*α1(ν, σ)*α2(ν, σ) + α3(ν, σ))/σ1(ν, σ)^3
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